Given
Data2 := READPRN("..\rolling2.log")
Data1 := READPRN("..\rolling1.log")
Size2 := rows(Data2)
Size1 := rows(Data1)
N := 5000
dt := 1/30
i := 0 .. Size2 - 1
i := 0 .. Size1 - 1
α(t) := 0
Yaw := Data2[:, 0]
X := Data2[:, 3]
Ζ := Data2[:, 6]
Yaw := Data1[:, 0]
X := Data1[:, 3]
Ζ := Data1[:, 6]
θ''(t) + 2*ν*θ'(t) + η^2*θ(t) == η^2*κ*α(t)
Pitch := Data2[:, 1]
Α := Data2[:, 7]
Pitch := Data1[:, 1]
Α := Data1[:, 7]
Y := Data2[:, 4]
Y := Data1[:, 4]
Roll := Data2[:, 2]
Z := Data2[:, 5]
Roll := Data1[:, 2]
Z := Data1[:, 5]
ν := 0.046
θ(0) == 5/57.29
R2(t) := Roll[t/dt]
η := 1.195
R1(t) := Roll[t/dt]
θ'(0) == 0
κ := 1
θ := Odesolve(t, N*dt)
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