Data := READPRN("roll.log")
Size := rows(Data)
weight := 500000*9.8
B := 8.2
i := 0 .. Size - 1
Roll := Data[:, 0]
TX := Data[:, 1]
TYl := Data[:, 2]
TZ := Data[:, 3]
mch := -(TX[1] - TX[0])/(Roll[1] - Roll[0])*180/(weight*π) = 0.81589
T := B*0.8/sqrt(mch) = 7.26253
i := 0 .. 180
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Ship := READPRN("ship.log")
Size := rows(Ship)
i := 0 .. Size - 1
Yaw := Ship[:, 1]
Time := Ship[:, 0]
Z := Ship[:, 6]
Pitch := Ship[:, 2]
Roll := Ship[:, 3]
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i := Size - 1000 .. Size - 1
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