## WAVE ATTRIBUTES
g := 9.8
Spm(omega, U) := 0.0081*g^2*omega^-5*exp(-0.74*(omega*U/g)^-4)
D(theta) := cos(theta)^8
Dn := integral(D(x), x = -π/2 .. π/2)
Dn = 0.859029
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SpmD(omega, theta, U) := Spm(omega, U)*D(theta)/Dn
Uwind := 15
wmax := 5
Nh := 30
Nd := 8
Lperiod := 2*Nh*Nh/wmax^2*g*π
Tperiod := 2*Nh/wmax*π
A(omega, theta) := sqrt(2*SpmD(omega, theta, Uwind))*sqrt(wmax/Nh*π/Nd)
i := 0 .. Nh*13
j := 0 .. Nd*7
Lperiod = 2216.71
Fi[i, j] := 60*rnd(1*π)
Tperiod = 37.6991
th[j] := j*π/Nd
w[i] := wmax*i/Nh
k[i] := w[i]^2/g
Wave1D(L, T, j) := sum(A(w[i], th[j])*cos(k[i]*L - w[i]*T + Fi[i, j]), i = 1 .. Nh)
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## WAVE SYNTHESIS
ImgW := 2048
StrideW := Lperiod/ImgW = 1.08238
ImgH := 64
StrideH := Tperiod/ImgH = 0.589049
i := 0 .. ImgW - 1
j := 0 .. ImgH - 1
Img[i, j] := Wave1D(i*StrideW, j*StrideH, 0)
ImgMin := min(Img) = -2.37758
ImgMax := max(Img) = 2.42103
ImgBMP[i, j] := 255*(Img[i, j] - ImgMin)/(ImgMax - ImgMin)
# [component: inputs ImgBMP]
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WRITEBMP("wave.bmp") := ImgBMP
info[0] := Lperiod
info[1] := Tperiod
info[2] := ImgMin
info[3] := ImgMax
info[4] := Nd
WRITEPRN("wave.txt") := info
