g := 9.8
Spm(omega, U) := 0.0081*g^2*omega^-5*exp(-0.74*(omega*U/g)^-4)
D(theta) := cos(theta)^8
Dn := integral(D(x), x = -π/2 .. π/2)
Dn = 0.859029
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SpmD(omega, theta, U) := Spm(omega, U)*D(theta)/Dn
Uwind := 15
wmax := 5
Nh := 30
Nd := 8
A(omega, theta) := sqrt(2*SpmD(omega, theta, Uwind))*sqrt(wmax/Nh*π/Nd)
i := 1 .. Nh
j := 1 .. Nd
Fi[i, j] := rnd(2*π)
th[j] := j*π/Nd
w[i] := wmax*i/Nh
k[i] := w[i]^2/g
Wave1D(L, T, j) := sum(A(w[i], th[j])*cos(k[i]*L - w[i]*T + Fi[i, j]), i = 1 .. Nh)
